*Heading
** Job name: Job-1 Model name: Model-1
*Preprint, echo=NO, model=NO, history=NO, contact=NO
** Generated by: Abaqus/CAE 2020
**
** PARTS
**
*Node
      1,           1.,           1.
      2,         0.75,           1.
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*User element, nodes=3, type=U1, properties=2, coordinates=2, variables=18
1, 2
*Element, TYPE=U1
 1,  1,  2,  7
 2,  7,  6,  1
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*ELEMENT, TYPE=CPS3, elset=decoy
 33,  1,  2,  7
 34,  7,  6,  1
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*Nset, nset=SOLID,  generate
 1,  25,  1
*Elset, elset=SOLID, generate
 1, 32, 1
*UEL PROPERTY, ELSET=SOLID
200e3, 0.3
*Elset, elset=Surf-1_S2, generate
  34,  58,   8
*Surface, type=ELEMENT, name=LoadSurf
Surf-1_S2, S2
*Nset, nset=supp, generate
5, 25, 5
*Solid Section, elset=decoy, material=decoy
1.,
*Amplitude, name=Amp-1
0., 0., 1., 0.5, 2.,-1.,3.,1.
4.,-0.5
*Material, name=decoy
*Density
7850e-12
*Depvar
4,
*User Material, constants=2
1.0e-11, 0.3
** ----------------------------------------------------------------
**
** STEP: Step-1
*Restart, write, frequency=0
**
*Step, name=Step-1, nlgeom=NO, inc=10000
*Dynamic,direct,nohaf,alpha=-0.05,beta=0.275625,gamma=0.55
0.1,4.,1e-15
**
** BOUNDARY CONDITIONS
**
** Name: BC-1 Type: Displacement/Rotation
*Boundary
supp, 1, 1
supp, 2, 2
** Name: BC-2 Type: load
*Dsload,amplitude=Amp-1
LoadSurf, TRSHR, 1921., 0., -1., 0.
**
** OUTPUT REQUESTS
**
*Output, field, frequency=1
*element output, elset=decoy
SDV
*Node Output
U,V
*Output, history, frequency=1
*Node Output,nset=supp
RF2
*End Step
